<Lems>

    <Target component="sim1" reportFile="/home/padraig/neuroConstruct/osb/cerebellum/cerebellar_granule_cell/GranuleCell/neuroConstruct/simulations/Sim_677/simulator.props" timesFile="/home/padraig/neuroConstruct/osb/cerebellum/cerebellar_granule_cell/GranuleCell/neuroConstruct/simulations/Sim_677/time.dat"/>

        <!--Include standard NeuroML 2 ComponentClass definitions-->

    <Include file="Cells.xml"/>
    <Include file="Networks.xml"/>
    <Include file="Simulation.xml"/>

    <Include file="PyNN.xml"/>

        <!--Include the generated NeuroML 2 files-->
    <Include file="Granule_98.nml"/>
    <Include file="Gran_CaHVA_98.nml"/>
    <Include file="Gran_KCa_98.nml"/>
    <Include file="Gran_CaPool_98.nml"/>
    <Include file="GranPassiveCond.nml"/>
    <Include file="Gran_NaF_98.nml"/>
    <Include file="Gran_KA_98.nml"/>
    <Include file="Gran_H_98.nml"/>
    <Include file="Gran_KDr_98.nml"/>
    <Include file="GranuleCell.nml"/>

    <Simulation id="sim1" length="700.0ms" step="0.001ms" target="network_GranuleCell">

        <Display id="GraphWin_0" title="GranuleCell: Default Simulation Configuration, Gran, VOLTAGE" xmin="-0.07" xmax="0.77000004" ymin="-0.104" ymax="0.064" timeScale="1s">
            <Line id="Gran_v" timeScale="1s" quantity="Gran/0/Granule_98/v" scale="1 V" color="#000000"/>
        </Display>

        <Display id="GraphWin_1" title="GranuleCell: Default Simulation Configuration, Gran, Gran_H_98:n, Gran_NaF_98:h, Gran_KDr_98:h, Gran_KCa_98:m, Gran_KA_98:m, Gran_KA_98:h, Gran_NaF_98:m, Gran_CaHVA_98:m, Gran_CaHVA_98:h" xmin="-0.07" xmax="0.77000004" ymin="-0.1" ymax="1.1" timeScale="1s">
            <Line id="Plot_1" timeScale="1s" quantity="Gran/0/Granule_98/biophys/membraneProperties/Gran_H_98_all/Gran_H_98/n/q" scale="1" color="#000000"/>

            <Line id="Plot_12" timeScale="1s" quantity="Gran/0/Granule_98/biophys/membraneProperties/Gran_NaF_98_all/Gran_NaF_98/h/q" scale="1" color="#ff0000"/>

            <Line id="Plot_2" timeScale="1s" quantity="Gran/0/Granule_98/biophys/membraneProperties/Gran_KDr_98_all/Gran_KDr_98/h/q" scale="1" color="#0000ff"/>

            <Line id="Plot_3" timeScale="1s" quantity="Gran/0/Granule_98/biophys/membraneProperties/Gran_KCa_98_all/Gran_KCa_98/m/q" scale="1" color="#009b00"/>

            <Line id="Plot_4" timeScale="1s" quantity="Gran/0/Granule_98/biophys/membraneProperties/Gran_KA_98_all/Gran_KA_98/m/q" scale="1" color="#ffc800"/>

            <Line id="Plot_5" timeScale="1s" quantity="Gran/0/Granule_98/biophys/membraneProperties/Gran_KA_98_all/Gran_KA_98/h/q" scale="1" color="#8c6400"/>

            <Line id="Plot_6" timeScale="1s" quantity="Gran/0/Granule_98/biophys/membraneProperties/Gran_NaF_98_all/Gran_NaF_98/m/q" scale="1" color="#ff00ff"/>

            <Line id="Plot_7" timeScale="1s" quantity="Gran/0/Granule_98/biophys/membraneProperties/Gran_CaHVA_98_all/Gran_CaHVA_98/m/q" scale="1" color="#ffff00"/>

            <Line id="Plot_8" timeScale="1s" quantity="Gran/0/Granule_98/biophys/membraneProperties/Gran_CaHVA_98_all/Gran_CaHVA_98/h/q" scale="1" color="#808080"/>
        </Display>

        <Display id="GraphWin_2" title="GranuleCell: Default Simulation Configuration, Gran, Gran_CaPool_98:CONC:ca" xmin="-0.07" xmax="0.77000004" ymin="-2.0E-4" ymax="0.0022" timeScale="1s">
            <Line id="Var_0" timeScale="1s" quantity="Gran/0/Granule_98/caConc" scale="1 mol_per_m3" color="#000000"/>
        </Display>

        <OutputFile id="Gran_v_OF" fileName="/home/padraig/neuroConstruct/osb/cerebellum/cerebellar_granule_cell/GranuleCell/neuroConstruct/simulations/Sim_677/Gran_0.dat">
            <OutputColumn id="v" quantity="Gran/0/Granule_98/v"/>
        </OutputFile>

        <OutputFile id="Plot_1_OF" fileName="/home/padraig/neuroConstruct/osb/cerebellum/cerebellar_granule_cell/GranuleCell/neuroConstruct/simulations/Sim_677/Gran_0.Gran_H_98_n.dat">
            <OutputColumn id="q" quantity="Gran/0/Granule_98/biophys/membraneProperties/Gran_H_98_all/Gran_H_98/n/q"/>
        </OutputFile>

        <OutputFile id="Plot_12_OF" fileName="/home/padraig/neuroConstruct/osb/cerebellum/cerebellar_granule_cell/GranuleCell/neuroConstruct/simulations/Sim_677/Gran_0.Gran_NaF_98_h.dat">
            <OutputColumn id="q" quantity="Gran/0/Granule_98/biophys/membraneProperties/Gran_NaF_98_all/Gran_NaF_98/h/q"/>
        </OutputFile>

        <OutputFile id="Plot_2_OF" fileName="/home/padraig/neuroConstruct/osb/cerebellum/cerebellar_granule_cell/GranuleCell/neuroConstruct/simulations/Sim_677/Gran_0.Gran_KDr_98_h.dat">
            <OutputColumn id="q" quantity="Gran/0/Granule_98/biophys/membraneProperties/Gran_KDr_98_all/Gran_KDr_98/h/q"/>
        </OutputFile>

        <OutputFile id="Plot_3_OF" fileName="/home/padraig/neuroConstruct/osb/cerebellum/cerebellar_granule_cell/GranuleCell/neuroConstruct/simulations/Sim_677/Gran_0.Gran_KCa_98_m.dat">
            <OutputColumn id="q" quantity="Gran/0/Granule_98/biophys/membraneProperties/Gran_KCa_98_all/Gran_KCa_98/m/q"/>
        </OutputFile>

        <OutputFile id="Plot_4_OF" fileName="/home/padraig/neuroConstruct/osb/cerebellum/cerebellar_granule_cell/GranuleCell/neuroConstruct/simulations/Sim_677/Gran_0.Gran_KA_98_m.dat">
            <OutputColumn id="q" quantity="Gran/0/Granule_98/biophys/membraneProperties/Gran_KA_98_all/Gran_KA_98/m/q"/>
        </OutputFile>

        <OutputFile id="Plot_5_OF" fileName="/home/padraig/neuroConstruct/osb/cerebellum/cerebellar_granule_cell/GranuleCell/neuroConstruct/simulations/Sim_677/Gran_0.Gran_KA_98_h.dat">
            <OutputColumn id="q" quantity="Gran/0/Granule_98/biophys/membraneProperties/Gran_KA_98_all/Gran_KA_98/h/q"/>
        </OutputFile>

        <OutputFile id="Plot_6_OF" fileName="/home/padraig/neuroConstruct/osb/cerebellum/cerebellar_granule_cell/GranuleCell/neuroConstruct/simulations/Sim_677/Gran_0.Gran_NaF_98_m.dat">
            <OutputColumn id="q" quantity="Gran/0/Granule_98/biophys/membraneProperties/Gran_NaF_98_all/Gran_NaF_98/m/q"/>
        </OutputFile>

        <OutputFile id="Plot_7_OF" fileName="/home/padraig/neuroConstruct/osb/cerebellum/cerebellar_granule_cell/GranuleCell/neuroConstruct/simulations/Sim_677/Gran_0.Gran_CaHVA_98_m.dat">
            <OutputColumn id="q" quantity="Gran/0/Granule_98/biophys/membraneProperties/Gran_CaHVA_98_all/Gran_CaHVA_98/m/q"/>
        </OutputFile>

        <OutputFile id="Plot_8_OF" fileName="/home/padraig/neuroConstruct/osb/cerebellum/cerebellar_granule_cell/GranuleCell/neuroConstruct/simulations/Sim_677/Gran_0.Gran_CaHVA_98_h.dat">
            <OutputColumn id="q" quantity="Gran/0/Granule_98/biophys/membraneProperties/Gran_CaHVA_98_all/Gran_CaHVA_98/h/q"/>
        </OutputFile>

        <OutputFile id="Var_0_OF" fileName="/home/padraig/neuroConstruct/osb/cerebellum/cerebellar_granule_cell/GranuleCell/neuroConstruct/simulations/Sim_677/Gran_0.Gran_CaPool_98_CONC_ca.dat">
            <OutputColumn id="caConc" quantity="Gran/0/Granule_98/caConc"/>
        </OutputFile>
    </Simulation>

</Lems>
